folder OrbweaversouthDefault: version=36; creator=C-CHANGE Foresite
  simulation name_OrbweaversouthDefault_mukey_407691_rot_cfs_sim
    metfile orbweaversouth-1990-2020.met: filename=met_files/orbweaversouth-1990-2020.met
    clock
      start_date = 01/01/2017  # Enter the start date of the simulation
      end_date = 31/12/2020  # Enter the end date of the simulation
    summaryfile
    area paddock
      Soil
        InitialWater Initial Water: FractionFull=1; PercentMethod=FilledFromTop
        Water
          Thickness  BD     AirDry  LL15   DUL    SAT    KS
          20.0       1.33   0.082   0.163  0.306  0.448  777.6
          20.0       1.33   0.082   0.163  0.306  0.448  777.6
          20.0       1.33   0.082   0.163  0.306  0.448  777.6
          20.0       1.33   0.082   0.163  0.306  0.448  777.6
          20.0       1.33   0.082   0.163  0.306  0.448  777.6
          50.0       1.33   0.082   0.163  0.306  0.448  777.6
          50.0       1.36   0.123   0.164  0.307  0.437  259.2
          50.0       1.36   0.123   0.164  0.307  0.437  259.2
          50.0       1.42   0.197   0.197  0.327  0.414  259.2
          100.0      1.42   0.197   0.197  0.327  0.414  259.2
          100.0      1.42   0.203   0.203  0.33   0.414  226.368
          100.0      1.42   0.225   0.225  0.343  0.414  95.04
          300.0      1.42   0.212   0.212  0.336  0.414  144.288
          300.0      1.428  0.198   0.198  0.328  0.411  259.2
          300.0      1.393  0.157   0.157  0.302  0.424  604.8
          500.0      1.36   0.144   0.144  0.294  0.437  777.6
          SoilCrop maize
            LL=[0.163, 0.163, 0.163, 0.163, 0.163, 0.163, 0.164, 0.164, 0.197, 0.197, 0.203, 0.225, 0.212, 0.2, 0.164, 0.152]
            KL=[0.08, 0.079, 0.078, 0.077, 0.076, 0.075, 0.073, 0.07, 0.068, 0.066, 0.062, 0.058, 0.054, 0.044, 0.036, 0.03]
            XF=[1.0, 1.0, 1.0, 1.0, 1.0, 1.0, 1.0, 1.0, 1.0, 1.0, 1.0, 1.0, 1.0, 1.0, 1.0, 1.0]
          SoilCrop soybean: same as name_OrbweaversouthDefault_mukey_407691_rot_cfs_sim.paddock.Soil.Water.maize
          SoilCrop wheat: same as name_OrbweaversouthDefault_mukey_407691_rot_cfs_sim.paddock.Soil.Water.maize
        SoilWater: SummerCona=4.0; SummerU=9.5; SummerDate=1-Jun; WinterCona=4.0; WinterU=9.5; WinterDate=1-Dec; DiffusConst=88; DiffusSlope=35; Salb=0.13; CN2Bare=73; CNRed=20; CNCov=0.8
          Thickness=[20.0, 20.0, 20.0, 20.0, 20.0, 50.0, 50.0, 50.0, 50.0, 100.0, 100.0, 100.0, 300.0, 300.0, 300.0, 500.0]
          SWCON=[0.5, 0.5, 0.5, 0.5, 0.5, 0.5, 0.5, 0.5, 0.5, 0.5, 0.5, 0.5, 0.5, 0.5, 0.5, 0.5]
        SoilOrganicMatter: RootCN=40; RootWt=1000; SoilCN=12; EnrACoeff=7.4; EnrBCoeff=0.2
          Thickness  OC     FBiom  FInert
          20.0       1.45   0.035  0.4
          20.0       1.45   0.035  0.4
          20.0       1.45   0.035  0.4
          20.0       1.45   0.035  0.4
          20.0       1.45   0.035  0.4
          50.0       1.45   0.035  0.4
          50.0       0.58   0.02   0.48
          50.0       0.58   0.02   0.48
          50.0       0.435  0.02   0.48
          100.0      0.435  0.02   0.48
          100.0      0.435  0.019  0.52
          100.0      0.435  0.015  0.68
          300.0      0.435  0.015  0.784
          300.0      0.406  0.014  0.82
          300.0      0.193  0.01   0.9
          500.0      0.145  0.01   0.9
        Analysis
          Thickness=[20.0, 20.0, 20.0, 20.0, 20.0, 50.0, 50.0, 50.0, 50.0, 100.0, 100.0, 100.0, 300.0, 300.0, 300.0, 500.0]
          PH=[6.6, 6.6, 6.6, 6.6, 6.6, 6.6, 6.0, 6.0, 5.7, 5.7, 5.66, 5.5, 5.59, 5.84, 6.067, 6.1]
        Sample Initial nitrogen
          Thickness  NO3    NH4
          20.0       1.45   1.45
          20.0       1.45   1.45
          20.0       1.45   1.45
          20.0       1.45   1.45
          20.0       1.45   1.45
          50.0       1.45   1.45
          50.0       0.58   0.58
          50.0       0.58   0.58
          50.0       0.435  0.435
          100.0      0.435  0.435
          100.0      0.435  0.435
          100.0      0.435  0.435
          300.0      0.435  0.435
          300.0      0.406  0.406
          300.0      0.193  0.193
          500.0      0.145  0.145
      surfaceom SurfaceOrganicMatter
        PoolName = soybean  # Organic Matter pool name
        type = soybean  # Organic Matter type
        mass = 1250  # Initial surface residue (kg/ha)
        cnr = 27  # C:N ratio of initial residue
        standing_fraction = 0.0  # Fraction of residue standing
      fertiliser
      maize
        ini
          filename=c:\Users\mjn\Documents\Dev\M1Analysis\data\crop_xml\MaizeM1.xml
      soybean
        ini
          filename=c:\Users\mjn\Documents\Dev\M1Analysis\data\crop_xml\SoybeanM1.xml
      outputfile: filename=name_OrbweaversouthDefault_mukey_407691_rot_cfs_sim.out; title=name_OrbweaversouthDefault_mukey_407691_rot_cfs_sim
        variables Output Variables
          variable:
            title
            dd/mm/yyyy as date
            day
            year
            soybean.yield as soybean_yield
            maize.yield as maize_yield
            soybean.biomass as soybean_biomass
            maize.biomass as maize_biomass
            corn_buac
            soy_buac
            fertiliser
            surfaceom_c
            leach_no3
            lch_no3n
          constants: constant precision=5
        events Output variable events: event=daily
      folder Manager folder
        operations Operations Schedule
          25/5/2017  soybean sow plants = 38 (plants/m2), sowing_depth = 51 (mm), cultivar = MG_2, row_spacing = 381 (mm), crop_class = plant
          30/10/2017  soybean end_crop
          25/5/2019  soybean sow plants = 38 (plants/m2), sowing_depth = 51 (mm), cultivar = MG_2, row_spacing = 381 (mm), crop_class = plant
          30/10/2019  soybean end_crop
          06/5/2018  maize sow plants = 7 (plants/m2), sowing_depth = 51 (mm), cultivar = B_110, row_spacing = 762 (mm), crop_class = plant
          22/3/2018  Fertiliser apply amount = 224 (kg/ha), depth = 50.0 (mm), type = MAP ()
          09/4/2018  Fertiliser apply amount = 146 (kg/ha), depth = 50.0 (mm), type = NH4_N ()
          06/11/2018  maize end_crop
          06/5/2020  maize sow plants = 7 (plants/m2), sowing_depth = 51 (mm), cultivar = B_110, row_spacing = 762 (mm), crop_class = plant
          22/3/2020  Fertiliser apply amount = 224 (kg/ha), depth = 50.0 (mm), type = MAP ()
          09/4/2020  Fertiliser apply amount = 146 (kg/ha), depth = 50.0 (mm), type = NH4_N ()
          06/11/2020  maize end_crop
        manager Empty manager
          on start_of_day:
```
        corn_buac   = maize.yield * 0.0159/0.85  ! corn yield in bushels/acre@15% moisture
        soy_buac   = soybean.yield * 0.0149/0.87  !  soybean yield in bushels/acre
        lch_no3n   = leach_no3 * 0.2259  !  leach_no3 as NO3-N
        !bbc_gradient = -1
        !bbc_potential = 200 - 100
```
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