folder AccolaDefault: version=36; creator=C-CHANGE Foresite
  simulation name_AccolaDefault_mukey_2800480_rot_cfs_sim
    metfile accola-1990-2020.met
      filename=../apsim_files/AccolaDefault/2019/cfs/met_files/accola-1990-2020.met
    clock
      start_date = 01/01/2016  # Enter the start date of the simulation
      end_date = 31/12/2019  # Enter the end date of the simulation
    summaryfile
    area paddock
      Soil
        InitialWater Initial Water: FractionFull=1; PercentMethod=FilledFromTop
        Water
          Thickness  BD     AirDry  LL15   DUL    SAT    KS
          20.0       1.1    0.082   0.165  0.286  0.535  792.288
          20.0       1.1    0.082   0.165  0.286  0.535  792.288
          20.0       1.1    0.082   0.165  0.286  0.535  792.288
          20.0       1.1    0.082   0.165  0.286  0.535  792.288
          20.0       1.1    0.082   0.165  0.286  0.535  792.288
          50.0       1.1    0.082   0.165  0.286  0.535  792.288
          50.0       1.1    0.082   0.165  0.286  0.535  792.288
          50.0       1.25   0.166   0.166  0.284  0.478  792.288
          50.0       1.25   0.166   0.166  0.281  0.478  792.288
          100.0      1.27   0.163   0.163  0.276  0.471  792.288
          100.0      1.35   0.149   0.149  0.27   0.441  792.288
          100.0      1.35   0.149   0.149  0.27   0.441  792.288
          300.0      1.483  0.12    0.12   0.265  0.39   792.288
          300.0      1.6    0.095   0.095  0.246  0.346  792.288
          300.0      1.6    0.095   0.095  0.246  0.346  792.288
          500.0      1.6    0.095   0.095  0.246  0.346  792.288
          SoilCrop maize
            LL=[0.165, 0.165, 0.165, 0.165, 0.165, 0.165, 0.165, 0.166, 0.166, 0.163, 0.149, 0.149, 0.124, 0.103, 0.103, 0.103]
            KL=[0.08, 0.079, 0.078, 0.077, 0.076, 0.075, 0.073, 0.07, 0.068, 0.066, 0.062, 0.058, 0.054, 0.044, 0.036, 0.03]
            XF=[0.299439, 0.299439, 0.299439, 0.299439, 0.299439, 0.299439, 0.299439, 0.299439, 0.299439, 0.299439, 0.299439, 0.299439, 0.299439, 0.299439, 0.299439, 0.299439]
          SoilCrop soybean
            LL=[0.165, 0.165, 0.165, 0.165, 0.165, 0.165, 0.165, 0.166, 0.166, 0.163, 0.149, 0.149, 0.124, 0.103, 0.103, 0.103]
            KL=[0.08, 0.079, 0.078, 0.077, 0.076, 0.075, 0.073, 0.07, 0.068, 0.066, 0.062, 0.058, 0.054, 0.044, 0.036, 0.03]
            XF=[1.0, 1.0, 1.0, 1.0, 1.0, 1.0, 1.0, 1.0, 1.0, 1.0, 1.0, 1.0, 1.0, 1.0, 1.0, 1.0]
          SoilCrop wheat: same as name_AccolaDefault_mukey_2800480_rot_cfs_sim.paddock.Soil.Water.soybean
        SoilWater: SummerCona=3.75; SummerU=8.5; SummerDate=1-Jun; WinterCona=3.75; WinterU=8.5; WinterDate=1-Dec; DiffusConst=88; DiffusSlope=35; Salb=0.13; CN2Bare=73; CNRed=20; CNCov=0.8
          Thickness=[20.0, 20.0, 20.0, 20.0, 20.0, 50.0, 50.0, 50.0, 50.0, 100.0, 100.0, 100.0, 300.0, 300.0, 300.0, 500.0]
          SWCON=[0.5, 0.5, 0.5, 0.5, 0.5, 0.5, 0.5, 0.5, 0.5, 0.5, 0.5, 0.5, 0.5, 0.5, 0.5, 0.5]
        SoilOrganicMatter: RootCN=40; RootWt=1000; SoilCN=12; EnrACoeff=7.4; EnrBCoeff=0.2
          Thickness  OC     FBiom  FInert
          20.0       3.48   0.035  0.4
          20.0       3.48   0.035  0.4
          20.0       3.48   0.035  0.4
          20.0       3.48   0.035  0.4
          20.0       3.48   0.035  0.4
          50.0       3.48   0.035  0.4
          50.0       3.48   0.035  0.4
          50.0       2.32   0.02   0.48
          50.0       2.32   0.02   0.48
          100.0      2.001  0.019  0.52
          100.0      0.725  0.015  0.68
          100.0      0.725  0.015  0.68
          300.0      0.416  0.012  0.797
          300.0      0.145  0.01   0.9
          300.0      0.145  0.01   0.9
          500.0      0.145  0.01   0.9
        Analysis
          Thickness=[20.0, 20.0, 20.0, 20.0, 20.0, 50.0, 50.0, 50.0, 50.0, 100.0, 100.0, 100.0, 300.0, 300.0, 300.0, 500.0]
          PH=[6.2, 6.2, 6.2, 6.2, 6.2, 6.2, 6.2, 6.2, 6.2, 6.28, 6.6, 6.6, 7.347, 8.0, 8.0, 8.0]
        Sample Initial nitrogen
          Thickness  NO3    NH4
          20.0       3.48   3.48
          20.0       3.48   3.48
          20.0       3.48   3.48
          20.0       3.48   3.48
          20.0       3.48   3.48
          50.0       3.48   3.48
          50.0       3.48   3.48
          50.0       2.32   2.32
          50.0       2.32   2.32
          100.0      2.001  2.001
          100.0      0.725  0.725
          100.0      0.725  0.725
          300.0      0.416  0.416
          300.0      0.145  0.145
          300.0      0.145  0.145
          500.0      0.145  0.145
      surfaceom SurfaceOrganicMatter
        PoolName = soybean  # Organic Matter pool name
        type = soybean  # Organic Matter type
        mass = 1250  # Initial surface residue (kg/ha)
        cnr = 27  # C:N ratio of initial residue
        standing_fraction = 0.0  # Fraction of residue standing
      fertiliser
      maize
        ini: filename=MaizeM1.xml
      soybean
        ini: filename=SoybeanM1.xml
      outputfile: filename=name_AccolaDefault_mukey_2800480_rot_cfs_sim.out; title=name_AccolaDefault_mukey_2800480_rot_cfs_sim
        variables Output Variables
          variable:
            title
            dd/mm/yyyy as date
            day
            year
            soybean.yield as soybean_yield
            maize.yield as maize_yield
            soybean.biomass as soybean_biomass
            maize.biomass as maize_biomass
            corn_buac
            soy_buac
            fertiliser
            surfaceom_c
            leach_no3
            lch_no3n
          constants: constant precision=5
        events Output variable events: event=daily
      folder Manager folder
        operations Operations Schedule
          28/4/2016  SurfaceOrganicMatter tillage type = user_defined, f_incorp = 0.25 (0-1), tillage_depth = 88.0 (mm)
          16/5/2016  SurfaceOrganicMatter tillage type = user_defined, f_incorp = 0.33 (0-1), tillage_depth = 75.8 (mm)
          18/5/2016  soybean sow plants = 34 (plants/m2), sowing_depth = 51 (mm), cultivar = MG_2, row_spacing = 762 (mm), crop_class = plant
          15/5/2016  Fertiliser apply amount = 2.8 (kg/ha), depth = 0.0 (mm), type = nh4so4_n ()
          24/9/2016  soybean end_crop
          28/4/2018  SurfaceOrganicMatter tillage type = user_defined, f_incorp = 0.25 (0-1), tillage_depth = 88.0 (mm)
          16/5/2018  SurfaceOrganicMatter tillage type = user_defined, f_incorp = 0.33 (0-1), tillage_depth = 75.8 (mm)
          18/5/2018  soybean sow plants = 34 (plants/m2), sowing_depth = 51 (mm), cultivar = MG_2, row_spacing = 762 (mm), crop_class = plant
          15/5/2018  Fertiliser apply amount = 2.8 (kg/ha), depth = 0.0 (mm), type = nh4so4_n ()
          24/9/2018  soybean end_crop
          16/4/2017  SurfaceOrganicMatter tillage type = user_defined, f_incorp = 0.25 (0-1), tillage_depth = 57 (mm)
          23/4/2017  SurfaceOrganicMatter tillage type = user_defined, f_incorp = 0.2 (0-1), tillage_depth = 76 (mm)
          18/5/2017  maize sow plants = 8 (plants/m2), sowing_depth = 51 (mm), cultivar = B_105, row_spacing = 762 (mm), crop_class = plant
          21/4/2017  Fertiliser apply amount = 112.09 (kg/ha), depth = 50.0 (mm), type = uan_n ()
          28/6/2017  Fertiliser apply amount = 56.04 (kg/ha), depth = 50.0 (mm), type = uan_n ()
          15/10/2017  maize end_crop
          16/4/2019  SurfaceOrganicMatter tillage type = user_defined, f_incorp = 0.25 (0-1), tillage_depth = 57 (mm)
          23/4/2019  SurfaceOrganicMatter tillage type = user_defined, f_incorp = 0.2 (0-1), tillage_depth = 76 (mm)
          18/5/2019  maize sow plants = 8 (plants/m2), sowing_depth = 51 (mm), cultivar = B_105, row_spacing = 762 (mm), crop_class = plant
          21/4/2019  Fertiliser apply amount = 112.09 (kg/ha), depth = 50.0 (mm), type = uan_n ()
          28/6/2019  Fertiliser apply amount = 56.04 (kg/ha), depth = 50.0 (mm), type = uan_n ()
          15/10/2019  maize end_crop
        manager Empty manager
          on start_of_day:
```
        corn_buac   = maize.yield * 0.0159/0.85  ! corn yield in bushels/acre@15% moisture
        soy_buac   = soybean.yield * 0.0149/0.87  !  soybean yield in bushels/acre
        lch_no3n   = leach_no3 * 0.2259  !  leach_no3 as NO3-N
        !bbc_gradient = -1
        !bbc_potential = 200 - 100
```
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